*HEADING
CCS Bistable Half-Beam - 2D Plane Strain
**
*NODE
1, 0.00000000, 0.25000000, 0.0
2, 0.04511278, 0.25002044, 0.0
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*ELEMENT, TYPE=CPE3, ELSET=BEAM
1, 796, 795, 1203
2, 1203, 797, 796
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*NSET, NSET=ANCHOR
1, 2, 797, 798, 799, 845, 847, 1199, 1202, 1518
*NSET, NSET=SHUTTLE
398, 399, 400, 401, 1007, 1198, 1352, 1353, 1468, 1520
*MATERIAL, NAME=POLYSI
*ELASTIC
160000.0, 0.2200
*SOLID SECTION, ELSET=BEAM, MATERIAL=POLYSI
0.5000
*STEP, NLGEOM, INC=1000
*STATIC
0.05, 1.0, 1e-8, 0.2
*BOUNDARY
ANCHOR, 1, 2, 0.0
*BOUNDARY
SHUTTLE, 2, 2, -0.97959184
*NODE FILE
U, RF
*NODE PRINT, NSET=SHUTTLE, TOTALS=YES
RF
*END STEP
