*HEADING
CCS Bistable Half-Beam - 3D
**
*NODE
1, 0.00000000, 0.25000000, 0.00000000
2, 0.09090909, 0.25008300, 0.00000000
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*ELEMENT, TYPE=C3D10, ELSET=BEAM
1, 4179, 4177, 4200, 17665, 4831, 4830, 4829, 18923, 18925, 18924
2, 17619, 17623, 17665, 4177, 18926, 18927, 18928, 18929, 18930, 18925
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*NSET, NSET=ANCHOR
1, 396, 397, 792, 793, 1189
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*NSET, NSET=SHUTTLE
198, 199, 594, 595, 989, 990
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*MATERIAL, NAME=POLYSI
*ELASTIC
160000.0, 0.2200
*SOLID SECTION, ELSET=BEAM, MATERIAL=POLYSI

*STEP, NLGEOM, INC=1000
*STATIC
0.05, 1.0, 1e-8, 0.2
*BOUNDARY
ANCHOR, 1, 3, 0.0
*BOUNDARY
SHUTTLE, 2, 2, -1.64210526
*NODE FILE
U, RF
*NODE PRINT, NSET=SHUTTLE, TOTALS=YES
RF
*END STEP
